# Ковалев Данил ВКБ32 | Лабораторная работа №1
# Вариант 7
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ε := 0.00001
y(x) := x^3 - 6*x^2 + 20
# Отделение корней графически
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# Отделение корней программно
root(y(x), x, 0, 2) =  # error: Значения функции в конечных точках должны иметь противоположные знаки.
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ε := 0.001
MPD(a, b, f, ε) :=
    return "Корней нет" if f(a)*f(b) > 0
    i ← 0
    while |b - a| > ε
        x ← (a + b)/2
        i ← i + 1
        break if f(x) == 0
        b ← x if f(a)*f(x) < 0
        a ← x otherwise
        M[i, 0] ← x
    M
# Note : это параметры для отображения в матрице такие
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MPD(0, 2, y, ε) = "Корней нет"
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x := 0.25
Given
x - sin(x) - 0.25 == 0
Find(x) = 1.17123
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# Note: тут у маткада проблема с x происходит, поэтому надо использовать x_1
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MPI(x0, f, φ, ε, maxn) :=
    n ← 0
    x ← φ(x0)
    while |x - x0| > ε and (n ≤ maxn)
        x0 ← x
        x ← x0 - φ(x0)*f(x)
        n ← n + 1
        M[n, 0] ← x
        M[n, 1] ← f(x)
    M
y(x_1) solve, x_1 → [
    4/(-2 + 2i*sqrt(15))^(1/3) + (-2 + 2i*sqrt(15))^(1/3) + 2;
    ((-2 + sqrt(60)*1i)^(1/3) - 2)*(2 - (-2 + sqrt(60)*1i)^(1/3) + 2i*sqrt(3) + sqrt(3)*(-2 + sqrt(60)*1i)^(1/3)*1i)/(2*(-2 + 2i*sqrt(15))^(1/3));
    -((-2 + 2i*sqrt(15))^(1/3) - 2)*((-2 + 2i*sqrt(15))^(1/3) - 2 + 2i*sqrt(3) + sqrt(3)*(-2 + 2i*sqrt(15))^(1/3)*1i)/(2*(-2 + 2i*sqrt(15))^(1/3))
]
x := 0
φ(x) := d/dx(y(x)) → 3*x^2 - 12*x
MPI(1, y, φ, 0.00001, 35) =  # error: При попытке расчета этого выражения найдено число с абсолютной величиной больше 10^307.
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HORD(a, b, f, ε) :=
    n ← 0
    f2(x) ← d^2/dx^2(f(x))
    if f(a)*f(b) > 0
        x1 ← b
        c ← a
    otherwise
        x1 ← a
        c ← b
    while |f(x1)| > ε
        n ← n + 1
        x2 ← x1 - f(x1)*(x1 - c)/(f(x1) - f(c))
        x1 ← x2
        M[n, 0] ← x1
    M
HORD(0, 2, y, ε) = [0; 2.5; 2.28571; 2.35577; 2.32965; 2.33901; 2.33561; 2.33684; 2.33639; 2.33655]
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MKAS(a, b, f, ε, maxn) :=
    x ← a if (d/da(f(a)))*(d^2/da^2(f(a))) > 0
    x ← b otherwise
    h ← 2*ε
    n ← 1
    while n ≤ maxn and |h| > ε
        h ← -f(x)/d/dx(f(x))
        x ← x + h
        M[n, 0] ← x
        n ← n + 1
    M
MKAS(-1, 2, y, ε, 10) = [0; 2.33333; 2.33651; 2.33651]
