# Лабораторная работа №1
# Ушенин Артём ВКБ32
# Вариант 8
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ε := 0.00001
y(x) := x^3 - 6*x^2 + 20
# Отделение корней графически
# [plot: y(x) vs x]
# Отделение корней программно
root(y(x), x, 0, 3) = 2.33651
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ε := 0.001
MPD(a, b, f, ε) :=
    if f(a)*f(b) > 0
        return "Корней нет"
    i ← 0
    while |b - a| > ε
        x ← (a + b)/2
        i ← i + 1
        if f(x) == 0
            break
        also if f(a)*f(x) < 0
            b ← x
        else
            a ← x
        M[i, 0] ← x
    M
# Note : это параметры для отображения в матрице такие
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MPD(0, 2, y, ε) = "Корней нет"
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x := -2.5
solve block
    # constraints
    x^3 - 6*x^2 + 20 == 0
    # solver
    Find(x) = -1.62008
end solve block
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y(x_1) solve, x_1 → [
    ((2*sqrt(15)*1i - 2)^(2/3) + 2*(2*sqrt(15)*1i - 2)^(1/3) + 4)/(2*sqrt(15)*1i - 2)^(1/3);
    ((-(sqrt(3)*1i) - 1)*(2*sqrt(15)*1i - 2)^(2/3) + (2*sqrt(3)*1i - 2)*(2*sqrt(15)*1i - 2)^(1/3) + 8)/((sqrt(3)*1i - 1)*(2*sqrt(15)*1i - 2)^(1/3));
    ((-(sqrt(3)*1i) + 1)*(2*sqrt(15)*1i - 2)^(2/3) + ((2*sqrt(3)*1i + 2)*(2*sqrt(15)*1i - 2)^(1/3) - 8))/((sqrt(3)*1i + 1)*(2*sqrt(15)*1i - 2)^(1/3))
]  # Note: тут у маткада проблема с x происходит, поэтому надо использовать x_1
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MPI(x0, f, φ, ε, maxn) :=
    n ← 0
    x ← φ(x0)
    while |x - x0| > ε and (n ≤ maxn)
        x0 ← x
        x ← x0 - φ(x0)*f(x)
        n ← n + 1
        M[n, 0] ← x
        M[n, 1] ← f(x)
    M
x := 0
φ(x) := d/dx(y(x)) → 3*x^2 - 12*x
MPI(1, y, φ, 0.00001, 35) =  # error: При вычислении этого выражения получено число с амплитудой больше 10^307. Mathcad не может присваивать числа больше 10^307.
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HORD(a, b, f, ε) :=
    n ← 0
    f2(x) ← d^2/dx^2(f(x))
    if f(a)*f(b) > 0
        x1 ← b
        c ← a
    else
        x1 ← a
        c ← b
    while |f(x1)| > ε
        n ← n + 1
        x2 ← x1 - f(x1)*(x1 - c)/(f(x1) - f(c))
        x1 ← x2
        M[n, 0] ← x1
    M
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MKAS(a, b, f, ε, maxn) :=
    if (d/da(f(a)))*(d^2/da^2(f(a))) > 0
        x ← a
    else
        x ← b
    h ← 2*ε
    n ← 1
    while n ≤ maxn and |h| > ε
        h ← -f(x)/d/dx(f(x))
        x ← x + h
        M[n, 0] ← x
        n ← n + 1
    M
MKAS(-1, 2, y, ε, 10) = [0; 2.33333; 2.33651; 2.33651]
HORD(0, 2, y, ε) = [0; 2.5; 2.28571; 2.35577; 2.32965; 2.33901; 2.33561; 2.33684; 2.33639; 2.33655]
