# Worksheet setting: ORIGIN = 1
# Лабораторная работа №2
# Вариант 8
# Выполнил: Ушенин Артем ВКБ32
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# Как поменять начало индексации в документе?
# Нужно выбрать "Инструменты" -> "Параметры документа" -> "Индекс начала массива"
C := [0.30, 1.20, -0.20, -0.60; -0.10, -0.20, 1.60, 0.30; -1.50, -0.30, 0.10, 0.70]
A := [0.20, 0.44, 0.91; 0.58, -0.29, 0.05; 0.05, 0.34, 0.10]
b := [0.74; 0.02; 0.32]
rank(C) = 3
rank(A) = 3  # Ранги равны соответственно по теореме Кронекера - Копелли существует решение
|A| = 0.159027  # Не равно 0, поэтому сущесвтует единственное решение
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solve block
    # constraints
    0.30*x + 1.20*y - 0.20*z == -0.60
    -0.10*x - 0.20*y + 1.60*z == 0.30
    -1.50*x - 0.30*y + 0.10*z == 0.70
    # solver
    Find(x, y, z) → [-0.381913303438; -0.385276532138; 0.115470852018]
end solve block
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lsolve(A, b) = [0.394625; 0.780471; 0.349085]
A^-1*b = [0.394625; 0.780471; 0.349085]
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rref(augment(A, b)) → [1.0, 0.0, 0.0, 0.394624812139; 0.0, 1.0, 0.0, 0.780471240733; 0.0, 0.0, 1.0, 0.349085375439]
# Метод Гаусса
Gauss(a, b, n) :=
    for i ∈ 1 .. n
        for j ∈ 1 .. n
            a0[i, j] ← a[i, j]
        b0[i] ← b[i]
    for k ∈ 1 .. n - 1
        if a[k, k] == 0
            m ← k + 1
            while m ≤ n and a[m, k] == 0
                m ← m + 1
            if m > n
                return "система не обусловлена "
            for j ∈ 1 .. n
                R ← a[m, j]
                a[m, j] ← a[k, j]
                a[k, j] ← R
            R ← b[m]
            b[m] ← b[k]
            b[k] ← R
        for i ∈ k + 1 .. n
            q ← a[i, k]/a[k, k]
            for j ∈ k .. n
                a[i, j] ← a[i, j] - q*a[k, j]
            b[i] ← b[i] - q*b[k]
    x[n] ← b[n]/a[n, n]
    for i ∈ n - 1, n - 2 .. 1
        s ← 0
        for j ∈ i + 1 .. n
            s ← s + a[i, j]*x[j]
        x[i] ← (b[i] - s)/a[i, i]
    for i ∈ 1 .. n
        s ← 0
        for j ∈ 1 .. n
            s ← s + a0[i, j]*x[j]
        δ[i] ← b0[i] - s
    [x; a; δ]
# Запоминание исходных коэффициентов
# Запоминание строки
# Обратный ход
Погрешности
Gauss(A, b, 3)[3] = [0; -2.63678e-16; 0]
Коэффициенты
Gauss(A, b, 3) = [
    [0.394625; 0.780471; 0.349085]; [0.2, 0.44, 0.91; 0, -1.566, -2.589; 0, 0, -0.507749]; [0; -2.63678e-16; 0]
]
Gauss(A, b, 3)[2] = [0.2, 0.44, 0.91; 0, -1.566, -2.589; 0, 0, -0.507749]
Решение
Gauss(A, b, 3)[1] = [0.394625; 0.780471; 0.349085]
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A1 := [0.74, 0.44, 0.91; 0.02, -0.29, 0.05; 0.32, 0.34, 0.10]
A2 := [0.20, 0.74, 0.91; 0.58, 0.02, 0.05; 0.05, 0.32, 0.10]
A3 := [0.20, 0.44, 0.74; 0.58, -0.29, 0.02; 0.05, 0.34, 0.32]
D1 := |A1|
D2 := |A2|
D3 := |A3|
D := |A|
D1 → 0.062756
D2 → 0.124116
D3 → 0.055514
D → 0.159027
x3 := D3/D
x1 := D1/D
x2 := D2/D
x1 → 0.394624812139
x2 → 0.780471240733
x3 → 0.349085375439
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ε := 0.0001
MPI(a, b, n, ε, kmax) :=
    k ← 0
    for i ∈ 1 .. n
        x[i] ← 0
    δ ← 2*ε
    while δ > ε and k ≤ kmax
        m ← -100
        k ← k + 1
        for i ∈ 1 .. n
            x0[i] ← x[i]
        M[k, 1] ← k
        for i ∈ 1 .. n
            S ← 0
            for j ∈ 1 .. n
                if (j == i)
                    continue
                S ← S + a[i, j]*x0[j]
            x[i] ← 1/a[i, i]*(b[i] - S)
            if |x[i] - x0[i]| > m
                m ← |x[i] - x0[i]|
            M[k, i + 1] ← x[i]
        δ ← m
        M[k, n + 2] ← δ
    M
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b1 := [0.02; 0.32; 0.74]
A1 := [0.58, -0.29, 0.05; 0.05, 0.34, 0.10; 0.20, 0.44, 0.91]
MPI(A1, b1, 3, ε, 100) = [
    1, 0.0344828, 0.941176, 0.813187, 0.941176;
    2, 0.434969, 0.696933, 0.350534, 0.462653;
    3, 0.352731, 0.774112, 0.380611, 0.0822379;
    4, 0.388728, 0.77736, 0.361368, 0.0359969;
    5, 0.39201, 0.777726, 0.351886, 0.0094817;
    6, 0.393011, 0.780032, 0.350987, 0.00230598;
    7, 0.394241, 0.780149, 0.349652, 0.00133486;
    8, 0.394415, 0.780361, 0.349325, 0.000327068;
    9, 0.394549, 0.780432, 0.349185, 0.000140503;
    10, 0.394596, 0.780453, 0.349121, 6.36213e-5
]
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zeid(a, b, n, ε, kmax) :=
    k ← 0
    δ ← 2*ε
    for i ∈ 1 .. n
        x[i] ← 0
    while δ > ε and k < kmax
        for i ∈ 1 .. n
            x0 ← x
        k ← k + 1
        for i ∈ 1 .. n
            s ← 0
            for j ∈ 1 .. n
                if j ≠ i
                    s ← s + a[i, j]*x[j]
            x[i] ← 1/a[i, i]*(b[i] - s)
        δ ← |x - x0|
        M[k, 1] ← k
        for i ∈ 1 .. n
            M[k, i + 1] ← x[i]
        M[k, 5] ← δ
    M
zeid(A1, b1, 3, ε, 100) = [
    1, 0.0344828, 0.936105, 0.352986, 1.00104;
    2, 0.472106, 0.76793, 0.338121, 0.469061;
    3, 0.389299, 0.784479, 0.348318, 0.0850574;
    4, 0.396695, 0.780393, 0.348668, 0.008457;
    5, 0.394621, 0.780594, 0.349027, 0.00211398;
    6, 0.394691, 0.780479, 0.349067, 0.000141137;
    7, 0.39463, 0.780476, 0.349082, 6.31588e-5
]
