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x0 := 0
x1 := 2
x2 := 3
y0 := -1
y1 := -4
y2 := 2
L2(x) := y0*(x - x1)*(x - x2)/((x0 - x1)*(x0 - x2)) + y1*(x - x0)*(x - x2)/((x1 - x0)*(x1 - x2)) + y2*(x - x0)*(x - x1)/((x2 - x0)*(x2 - x1))
# [plot: L2(x) vs x]
