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# Задание 2. Вычислить одно значение заданной функции для промежуточного значения аргумента a с помощью интерполяционного многочлена Лагранжа и оценить погрешность интерполяции.
n := 6
i := 0 .. n
a := 4.2
x := [1.3; 2.1; 3.7; 4.5; 6.1; 7.7; 8.5]
y := [1.777; 4.563; 13.84; 20.39; 37.34; 59.41; 72.4]
Ln(t) := sum(y[k]*product(if(k == j, 1, (t - x[j])/(x[k] - x[j])), j = 0 .. n), k = 0 .. n)
t := -3.2, -3.0 .. 10
f(x) := 2.1*sin(0.37*x)
R(x) := max(|f(x)^(n + 1)|)/(n + 1)!*|product(x - x[q], q = 0 .. n)|
R(x) = 205346
# [plot: y, Ln(t) vs x, t]
Ln(a) = 17.7832
