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a := 0.7
b := 0.85
h := 0.025
n := 3
i := 0 .. n
h0 := 0.05
x[i] := a + i*h0
y[i] := cos(x[i])
x = [0.7; 0.75; 0.8; 0.85]
y = [0.764842; 0.731689; 0.696707; 0.659983]
t := (x - x[3])/h0
n1 := 0 .. 2
n2 := 0 .. 1
n3 := 0
Δ1y[n1] := y[n1 + 1] - y[n1]
Δ2y[n2] := Δ1y[n2 + 1] - Δ1y[n2]
Δ3y[n3] := Δ2y[n3 + 1] - Δ2y[n3]
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Δ1y = [-0.0331533; -0.0349822; -0.0367236]
Δ2y = [-0.00182884; -0.0017414]
Δ3y = [8.74372e-5]
Pn(x) := y[3] + t*Δ1y[2] + t*(t + 1)*Δ2y[1]/2! + t*(t - 1)*(t - 2)*Δ3y[0]/3!
R := h0^(n + 1)/(n + 1)!*|t*(t + 1)*(t + 2)*(t + 3)|
R = 1.66667e-5
# [plot: y[i], Pn(x) vs x[i], x]
