# Ушенин Артём ВКБ32 | Лабораторная работа 5
# Вариант 8
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a := 0
b := 1
y[0] := 1
h := 0.1
h2 := 0.2
y2[0] := 2
i := 0 .. 10
x[i + 1] := a + i*h
j := 0 .. 5
x2[j + 1] := a + j*h2
y[i + 1] := y[i] + h*(3*x[i]*y[i] + 1)/(5 - x[i] + y[i]^2)
y2[j + 1] := y2[j] + h2*(3*x2[j]*y2[j] + 1)/(5 - x2[j] + y2[j]^2)
x2 = [0; 0; 0.2; 0.4; 0.6; 0.8; 1]
y2 = [2; 2.02222; 2.04423; 2.09382; 2.17202; 2.27971; 2.41744]
x = [0; 0; 0.1; 0.2; 0.3; 0.4; 0.5; 0.6; 0.7; 0.8; 0.9; 1]
y = [1; 1.01667; 1.03324; 1.05519; 1.08281; 1.11643; 1.15645; 1.2033; 1.25744; 1.31934; 1.38947; 1.46827]
# Оценка погрешности
|y2[6] - y[11]|/15 = 0.0632784
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# Функция которую вычислить
f(x, y) := (x^2*y + 2)/(2*x - y)
y2[j + 1] := y2[j] + h2*f(x2[j], y2[j])
y[i + 1] := y[i] + h*f(x[i], y[i])
k[1] := h*f(x[1], y[1])
k2[1] := h2*f(x2[1], y2[1])
k[2] := h*f(x[1] + h/2, y[1] + k[1]/2)
k2[2] := h2*f(x2[1] + h2/2, y2[1] + k2[1]/2)
k[3] := h*f(x[2] + h/2, y[2] + k[2]/2)
k2[3] := h2*f(x2[2] + h2/2, y2[2] + k2[2]/2)
k[4] := h*f(x[3] + h, y[3] + k[3])
k2[4] := h2*f(x2[3] + h2, y2[3] + k2[3])
y[i + 1] := y[i] + (k[1] + 2*k[2] + 2*k[3] + k[4])/6
y2[j + 1] := y2[j] + (k2[1] + 2*k2[2] + 2*k2[3] + k2[4])/6
x2 = [0; 0; 0.2; 0.4; 0.6; 0.8; 1]
y2 = [2; 1.86159; 1.72318; 1.58476; 1.44635; 1.30794; 1.16953]
x = [0; 0; 0.1; 0.2; 0.3; 0.4; 0.5; 0.6; 0.7; 0.8; 0.9; 1]
y = [1; -0.0303269; -1.06065; -2.09098; -3.12131; -4.15163; -5.18196; -6.21229; -7.24262; -8.27294; -9.30327; -10.3336]
# Оценка погрешности
|y2[6] - y[11]|/15 = 0.766875
# Вывод: погрешность меньше у метода Рюнге-Кутты, поэтому он более точный
