# Лабораторная работа 6
# Ушенин Артём ВКБ32
# Вариант 8
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i := 1 .. 10
ORIGIN := 1
x[1] := 2.0
y[1] := 7.5
x[2] := 1.4
y[2] := 6.1
x[3] := 1.0
y[3] := 4.8
x[4] := 1.7
y[4] := 7.4
x[5] := 1.3
y[5] := 5.7
x[6] := 1.6
y[6] := 7.0
x[7] := 1.9
y[7] := 7.1
x[8] := 1.5
y[8] := 6.8
x[9] := 1.2
y[9] := 6.0
x[10] := 2.1
y[10] := 8.9
x := sort(x)
y := sort(y)
mx := sum(x[i], i = 1 .. 10)/10
mx2 := sum(x[i]^2, i = 1 .. 10)/10
mxy := sum(x[i]*y[i], i = 1 .. 10)/10
my := sum(y[i], i = 1 .. 10)/10
mx = 1.57
mx2 = 2.581
mxy = 10.92
my = 6.73
solve block
    # constraints
    mx2*a + mx*b == mxy
    mx*a + b == my
    # solver
    res1 := Find(a, b) → [3.04823428079; 1.94427217916]
end solve block
a1 := res1[1]
b1 := res1[2]
y1(x) := a1*x + b1
mx4 := sum(x[i]^4, i = 1 .. 10)/10
mx3 := sum(x[i]^3, i = 1 .. 10)/10
mx2y := sum(x[i]^2*y[i], i = 1 .. 10)/10
mx4 = 7.82197
mx3 = 4.4173
mx2y = 18.4806
solve block
    # constraints
    mx4*a + mx3*b + mx2*c == mx2y
    mx3*a + mx2*b + mx*c == mxy
    mx2*a + mx*b + c == my
    # solver
    res2 := Find(a, b, c) → [-0.209423412332; 3.70686279539; 1.45074723847]
end solve block
a2 := res2[1]
b2 := res2[2]
c2 := res2[3]
y2(x) := a2*x^2 + b2*x + c2
y1(x) = [4.99251; 5.60215; 5.90698; 6.2118; 6.51662; 6.82145; 7.12627; 7.73592; 8.04074; 8.34556]
y2(x) = [4.94819; 5.59741; 5.91574; 6.22989; 6.53984; 6.8456; 7.14718; 7.73777; 8.02678; 8.3116]
y = [4.8; 5.7; 6; 6.1; 6.8; 7; 7.1; 7.4; 7.5; 8.9]
# [plot: y1(x), y vs x]
Линейная
# [plot: y2(x), y vs x]
Квадратичная
S1 := sum((y[k] - y1(x)[k])^2, k = 1 .. 10) = 0.893299
S2 := sum((y[k] - y2(x)[k])^2, k = 1 .. 10) = 0.887997
S1 > S2 → 1  # к12
# Выводы по заданию
# Наиболее подходящим оказалась квадратичная формула.
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# 1) Поиск степенной приближающей фунции y = ax^m
# Пролагорифмиурем ln(y) = m*ln(x)+ln(a)
mx2 := sum(ln(x[i])^2, i = 1 .. 10)/10
mx := sum(ln(x[i]), i = 1 .. 10)/10
mxy := sum(ln(x[i])*ln(y[i]), i = 1 .. 10)/10
my := sum(ln(y[i]), i = 1 .. 10)/10
# Замена : m = A,  ln(a) = B, ln(y)  = v, ln(x) = u
# Получим v = Au+B
solve block
    # constraints
    mx2*a + mx*b == mxy
    mx*a + b == my
    # solver
    res3 := Find(a, b) → [0.704383285849; 1.59308655767]
end solve block
m1 := res3[1]
a3 := e^res3[2]
y3(x) := a3*x^m1
# 2) Поиск экспоненциальной приближающей фунции y = ae^mx
# Пролагорифмиурем ln(y) = mx+ln(a)
# Замена : m = A,  ln(a) = B, ln(y)  = v, x = u
mx2 := sum(x[i]^2, i = 1 .. 10)/10
mx := sum(x[i], i = 1 .. 10)/10
mxy := sum(x[i]*ln(y[i]), i = 1 .. 10)/10
my := sum(ln(y[i]), i = 1 .. 10)/10
# Получим v = Au+B
solve block
    # constraints
    mx2*a + mx*b == mxy
    mx*a + b == my
    # solver
    res4 := Find(a, b) → [0.461017410357; 1.16965188333]
end solve block
m2 := res4[1]
a4 := e^res4[2]
y4(x) := a4*e^(m2*x)
# [plot: y3(x), y vs x]
# Квадратичная
# [plot: y4(x), y vs x]
Экспоненциальная
y3(x) = [4.91891; 5.59297; 5.91737; 6.23446; 6.54492; 6.84932; 7.14814; 7.73069; 8.0151; 8.29535]
y4(x) = [5.10729; 5.60059; 5.86484; 6.14154; 6.43131; 6.73474; 7.0525; 7.73368; 8.09856; 8.48066]
# [plot: y1(x), y3(x), y4(x), y vs x]
S3 := sum((y[k] - y3(x)[k])^2, k = 1 .. 10) = 0.88088
S4 := sum((y[k] - y4(x)[k])^2, k = 1 .. 10) = 0.978322
S3 > S4 → 0
# Итог задания 2
# Метод оказался наименьшим для экспоненциальной функции
# Итоги лабораторной работы
S1 = 0.893299
S2 = 0.887997
S3 = 0.88088
S4 = 0.978322
S3 > S4 > S1 > S2 → 0
# Из всех расмотренных функций наименьшим метод меньших квдратов - это для квадроатичной функции
