# Ушенин Артём ВКБ32 | Лабораторная работа 7
# Вариант 8
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f(x) := (3*x^2 + 2)*sin(2*π(x - 0.2))
i := 0 .. 5
j := 0 .. 4
x[0] := 0.2
x[5] := 0.7
h := 0.1
x[i + 1] := x[i] + h
u[i, 0] := f(x[i])  # error: Это значение должно быть функцией.
u[0, j + 1] := 0
u[5, j + 1] := 0
i := 1 .. 4
u[i, 1] := (u[i - 1, 0] + u[i + 1, 0])/2
u[i, 2] := (u[i - 1, 1] + u[i + 1, 1])/2
u[i, 3] := (u[i - 1, 2] + u[i + 1, 2])/2
u[i, 4] := (u[i - 1, 3] + u[i + 1, 3])/2
u[i, 5] := (u[i - 1, 4] + u[i + 1, 4])/2
f4(x) := d^4/dx^4((1.5*x^2 + 1)*sin(2*π*x)) collect → x^2*2337.81818482*sin(6.28318530718*x) + (847.933939666*sin(6.28318530718*x) - x*2976.60256131*cos(6.28318530718*x))
# [plot: f4(x) vs x]
f4(x) = [2204.63; 2204.63; 1896.6; 1398.2; 899.796; 591.766; 591.766]
u = [
    0, 0, 0, 0, 0, 0;
    0, 0, 0, 0, 0, 0;
    0, 0, 0, 0, 0, 0;
    0, 0, 0, 0, 0, 0;
    0, 0, 0, 0, 0, 0;
    0, 0, 0, 0, 0, 0
]
m1 := |max(f4(x))| = 2204.63
T := 0.03
ε := T*m1*h^2 = 0.66139
