# Ушенин Артём ВКБ32 | Лабораторная работа 8
# Вариант 8
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# N | a | b
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i := 1 .. 5
ORIGIN := 1
x[1] := 2.0
y[1] := 7.5
a := 1
x[2] := 1.4
y[2] := 6.1
b := 2
x[3] := 1.0
y[3] := 4.8
x[4] := 1.7
y[4] := 7.4
x[5] := 1.3
y[5] := 5.7
# [plot: y[i] vs x[i]]
# 1. Рассмотрим семейство гипербол
f(x, a, b) := a + b/x
# Составим сумму квадратов отклонений левых и правых частей
S(a, b) := sum((f(x[i], a, b) - y[i])^2, i = 1 .. 5)
# Найдем наименьшее значение функции S
solve block
    # solver
    P := Minimize(S, a, b)
end solve block
P = [9.25318; -3.73499]
# Значение параметров а и б, при которых функция S достигает наименьшего значения, равны
a := P*[1; 0]
b := P*[0; 1]
f1(t) := a + b/t
# Построим экспериментальные точки и график полученной функции
# [plot: f1(t), y[i] vs t, x[i]]
S1 := sum((y[k] - f1(x)[k])^2, k = 1 .. 5) = 5.88366
h(x, a, b) := 1/(a + b*x)
S(a, b) := sum((h(x[i], a, b) - y[i])^2, i = 1 .. 5)
P := Minimize(S, a, b)
P = [-417986; -966198]
a := P*[1; 0]
b := P*[0; 1]
h1(t) := 1/(a + b*t)
# [plot: h1(t), y[i] vs t, x[i]]
S2 := sum((y[k] - h1(x)[k])^2, k = 1 .. 5) = 319.21
S1 > S2 → 0
